TOL := 1*10^-3
ORIGIN := 0
ORIGIN = 0
TOL = 0.001
R1 := 2
R2 := 6
C1 := 0.4
L1 := 10
vC10 := 0
iL10 := 0
i0(t) := 1*Φ(t)
i0(t) := (1*Φ(t) - 1*Φ(t - 5)) - 0.5*Φ(t - 10)  # disabled
I0(s) := i0(t) laplace, t; float, 3 → 1/s
I0(s) := 1  # disabled
Given
I0(s) == v1/R1 + (v1 - v2 - vC10/s)*C1*s + (v1 - v2)/R2
(v1 - v2 - vC10/s)*C1*s + (v1 - v2)/R2 == (v2 + L1*iL10)*1/(L1*s)
V(s) := Find(v1, v2) float, 3 → [
    (50.0*s + 120.0*s^2 + 30.0)/(20.0*s + 37.0*s^2 + 60.0*s^3);
    (120.0*s + 50.0)/(37.0*s + 60.0*s^2 + 20.0)
]
v1(s) := V(s)[0] → (50.0*s + 120.0*s^2 + 30.0)/(20.0*s + 37.0*s^2 + 60.0*s^3)
v2(s) := V(s)[1] → (120.0*s + 50.0)/(37.0*s + 60.0*s^2 + 20.0)
H(s) := v2(s)/I0(s) simplify; float, 3 → s*(120.0*s + 50.0)/(37.0*s + 60.0*s^2 + 20.0)
v1(t) := v1(s) invlaplace; float, 3 → 0.5*cos(0.488*t)*e^(-0.308*t) + (-0.504*sin(0.488*t)*e^(-0.308*t)) + 1.5
v2(t) := v2(s) invlaplace; float, 3 → 2.0*cos(0.488*t)*e^(-0.308*t) + 0.444*sin(0.488*t)*e^(-0.308*t)
hδ(t) := H(s) invlaplace; float, 3 →  # error: Эта переменная не определена.
h(t) := H(s)/s invlaplace; float, 3 → 2.0*cos(0.488*t)*e^(-0.308*t) + 0.444*sin(0.488*t)*e^(-0.308*t)
h(0) = 2
g(t) := -0.75*cos(0.433*t)*e^(-0.75*t) + 0.433*sin(0.433*t)*e^(-0.75*t)
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f := 0.1
T := 1/f float, 3 → 10.0
T = 10
i0(t) :=
    0 if t < 0
    sign(sin(2*π*f*t)) if 0 ≤ t < 5*T
    0 otherwise
NP := 1000
n := 0 .. NP - 1
TA := 10*T float, 4 → 100.0
Δ := TA/(NP - 1)
Δ = 0.1001
t[n] := n*Δ
I0[n] := i0(t[n])
Hg[n] := g(t[n])
Vx[n] := h(0)*I0[n] + Δ*sum(I0[m]*Hg[n - m], m = 0 .. n)
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Hδ[n] =  # error: Эта переменная не определена.
n =  # no stored result
I0[n] =  # no stored result
t =  # no stored result
t := zx  # error: Эта переменная не определена.
g(t) :=
    0 if t < 0
    g(t) if t > 0
v3(t) := h(0)*i0(t) + integral(i0(x)*g(t - x), x = 0 .. t)
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