TOL := 1*10^-3
ORIGIN := 0
ORIGIN = 0
TOL = 0.001
R1 := 2
R2 := 6
C1 := 0.4
L1 := 10
FC(f, N, T) :=
    R[:, 0] ← [1/T*integral(f(x), x = 0 .. T); 0]
    for n ∈ 1 .. N
        R[:, n] ← [2/T*integral(f(x)*cos(n*2*π*x/T), x = 0 .. T); 2/T*integral(f(x)*sin(n*2*π*x/T), x = 0 .. T)]
    transpose(R)
TOL := 10^-6
f := 0.05
T := 1/f → 20.0
T = 20
Vx := 2
ϕx := 145
v0(t) := Vx*(sin(2*π*1/T*t)*cos(π/180*ϕx) + cos(2*π*1/T*t)*sin(π/180*ϕx))*sign(sin(2*π*1/T*t))
U := 2/π*Vx*cos(π/180*ϕx) float, 4 → -1.043
2/π = 0.63662
N := 20
res := FC(v0, N, T)
a := res[:, 0]
b := res[:, 1]
p1(t) := a[0] + sum(a[n]*cos(n*2*π*t/T) + b[n]*sin(n*2*π*t/T), n = 1 .. N)
a[0] = -1.04298
b[0] = 0
n := 1 .. N
a[0] = -1.04298
b[0] = 0
A[n] := sqrt(a[n]^2 + b[n]^2)
A[0] := a[0]
A[0] = -1.04298
Θ[n] := atan2(a[n], b[n])
Θ[0] = 0
p2(t) := a[0] + sum(A[n]*cos(n*2*π*t/T - Θ[n]), n = 1 .. N)
A = [-1.04298; 0; 1.1965; 0; 0.413574; 0; 0.257384; 0; 0.188405; 0; 0.149032; 0; 0.123433; 0; 0.105408; 0; 0.0920099; 0; 0.0816515; 0; 0.0733995]
a = [-1.04298; 0; 0.695318; 0; 0.139064; 0; 0.0595987; 0; 0.0331104; 0; 0.0210702; 0; 0.0145871; 0; 0.0106972; 0; 0.00818021; 0; 0.00645806; 0; 0.00522795]
b = [0; 0; 0.973734; 0; 0.389493; 0; 0.250389; 0; 0.185473; 0; 0.147535; 0; 0.122568; 0; 0.104864; 0; 0.0916455; 0; 0.0813957; 0; 0.0732131]
res = [
    -1.04298, 0;
    0, 0;
    0.695318, 0.973734;
    0, 0;
    0.139064, 0.389493;
    0, 0;
    0.0595987, 0.250389;
    0, 0;
    0.0331104, 0.185473;
    0, 0;
    0.0210702, 0.147535;
    0, 0;
    0.0145871, 0.122568;
    0, 0;
    0.0106972, 0.104864;
    0, 0;
    0.00818021, 0.0916455;
    0, 0;
    0.00645806, 0.0813957;
    0, 0;
    0.00522795, 0.0732131
]
T = 20
TOL = 1e-6
N = 20
n := 0 .. N
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H(s) := s*(15.0*s + 25.0)/(28.0*s + 15.0*s^2 + 20.0)
j := sqrt(-1)
BodePlot(F, MinFreq, MaxFreq) :=
    ndk ← 20
    n ← ndk*ceil(log(MaxFreq/MinFreq))
    r ← ln(MaxFreq/MinFreq)
    for i ∈ 0 .. n
        f ← MinFreq*e^(i*r/n)
        Z[i, 0] ← f
        V ← F(j*2*π*f)
        Z[i, 1] ← 20*log(|V|)
        Z[i, 2] ← arg(V)*180/π
    for i ∈ 1 .. n
        Z[i, 2] ← Z[i, 2] - 360*sign(Z[i, 2] - Z[i - 1, 2]) if |Z[i, 2] - Z[i - 1, 2]| > 300
    Z
zB := BodePlot(H, 0.0001, 10000)
i := 0 .. last(zB[:, 0])
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j := sqrt(-1)
TOL = 1e-6
H(jω) → jω*(15.0*jω + 25.0)/(28.0*jω + 15.0*jω^2 + 20.0)
j*ω[n] := j*n*2*π/T  # error: Здесь необходимо указать имя.
H[n] := j*n*2*π/T*(15.0*(j*n*2*π/T) + 25.0)/(28.0*(j*n*2*π/T) + 15.0*(j*n*2*π/T)^2 + 20.0)
N = 20
n := 1 .. N
T = 20
v0(t) := p2(t)
D[n] := A[n]*|H[n]|
G[n] := arg(H[n])
a[0] = -1.04298
H[0] = 0
v1(t) := a[0]*H[0] + sum(D[n]*cos(n*2*π*t/T - Θ[n] + G[n]), n = 1 .. N)
v1(t) := a[0]*H[0] + sum(A[n]*|H[n]|*cos(n*2*π*t/T - Θ[n] + arg(H[n])), n = 1 .. N)
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N = 20
n := 0 .. N
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D[n] = [0; 0; 0.891423; 0; 0.459944; 0; 0.293423; 0; 0.208641; 0; 0.160774; 0; 0.130692; 0; 0.110162; 0; 0.0952757; 0; 0.0839849; 0; 0.0751214]
|H[n]| = [0; 0.389821; 0.745022; 0.9944; 1.11212; 1.1443; 1.14002; 1.12448; 1.10741; 1.09194; 1.07879; 1.06785; 1.05881; 1.05132; 1.0451; 1.03989; 1.03549; 1.03177; 1.02858; 1.02583; 1.02346]
A[n] = [-1.04298; 0; 1.1965; 0; 0.413574; 0; 0.257384; 0; 0.188405; 0; 0.149032; 0; 0.123433; 0; 0.105408; 0; 0.0920099; 0; 0.0816515; 0; 0.0733995]
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